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/BATCH
/COM,ANSYS RELEASE Release 19.1      BUILD 19.1      UP20180418       10:28:22
/input,menust,tmp,''
/GST,ON
/PLO,INFO,3
/GRO,CURL,ON
/CPLANE,1
WPSTYLE,,,,,,,,0
genbeamsec
/COM,ANSYS RELEASE Release 19.1      BUILD 19.1      UP20180418       10:30:04
buildbridge
/COM,ANSYS RELEASE Release 19.1      BUILD 19.1      UP20180418       10:31:08
solmode
/POST1
SET,LIST
SAVE
FINISH
! /EXIT,ALL
/BATCH
/COM,ANSYS RELEASE Release 19.1      BUILD 19.1      UP20180418       10:37:33
/input,menust,tmp,''
/GST,ON
/PLO,INFO,3
/GRO,CURL,ON
/CPLANE,1
WPSTYLE,,,,,,,,0
Ansys_to_MSBdat
FINISH
! /EXIT,NOSAV
/BATCH
/COM,ANSYS RELEASE Release 19.1      BUILD 19.1      UP20180418       10:38:37
/input,menust,tmp,''
/GST,ON
/PLO,INFO,3
/GRO,CURL,ON
/CPLANE,1
WPSTYLE,,,,,,,,0
/POST1
SET,LIST
NPLOT
LPLOT
EPLOT
NPLOT
nsel,all
nlist
buildbridge
/COM,ANSYS RELEASE Release 19.1      BUILD 19.1      UP20180418       10:39:36
solmode
Ansys_to_MSBdat
Ansys_to_MSBdat_cont
Ansys_to_MSBdat_Post
NPLOT
EPLOT
esel,all
EPLOT
/eshape,1
eplot
SET,LIST
genbeamsec
/COM,ANSYS RELEASE Release 19.1      BUILD 19.1      UP20180418       12:26:04
buildbridge
/COM,ANSYS RELEASE Release 19.1      BUILD 19.1      UP20180418       12:26:15
solmode
/POST1
SET,LIST
PLDISP,0
SET,NEXT
SET,NEXT
SET,NEXT
SET,NEXT
SET,NEXT
SET,NEXT
SET,NEXT
SET,NEXT
SET,NEXT
SET,FIRST
SET,NEXT
SET,NEXT
SET,NEXT
SET,NEXT
SET,FIRST
SET,NEXT
SET,NEXT
SET,NEXT
SET,NEXT
SET,NEXT
SET,NEXT
SET,NEXT
SET,NEXT
SET,NEXT
SET,LIST
solmode
/POST1
SET,LIST
PLDISP,0
SET,NEXT
SET,NEXT
solmode
/POST26
FILE,'General32','rst','.'
NUMVAR,200
SOLU,191,NCMIT
STORE,MERGE
FILLDATA,191,,,,1,1
REALVAR,191,191
FINISH
/POST1
PLDISP,0
Ansys_to_MSBdat_cont
solmode
Ansys_to_MSBdat
Ansys_to_MSBdat_cont
Ansys_to_MSBdat_Post
SAVE
FINISH
! /EXIT,ALL
/BATCH
/COM,ANSYS RELEASE Release 19.1      BUILD 19.1      UP20180418       16:53:34
/input,menust,tmp,''
/GST,ON
/PLO,INFO,3
/GRO,CURL,ON
/CPLANE,1
WPSTYLE,,,,,,,,0
RESUME
/COM,ANSYS RELEASE Release 19.1      BUILD 19.1      UP20180418       16:54:20
EPLOT
esel,all
EPLOT
a2vbc
FINISH
/POST26
FILE,'General32','rst','.'
NUMVAR,200
SOLU,191,NCMIT
STORE,MERGE
FILLDATA,191,,,,1,1
REALVAR,191,191
FINISH
/POST1
/BATCH
/COM,ANSYS RELEASE Release 19.1      BUILD 19.1      UP20180418       13:48:59
/input,menust,tmp,''
/GST,ON
/PLO,INFO,3
/GRO,CURL,ON
/CPLANE,1
WPSTYLE,,,,,,,,0
