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/BATCH
/COM,ANSYS RELEASE Release 19.1      BUILD 19.1      UP20180418       20:34:46
/input,menust,tmp,''
/GST,ON
/PLO,INFO,3
/GRO,CURL,ON
/CPLANE,1
WPSTYLE,,,,,,,,0
finish
/prep7
/BATCH
/COM,ANSYS RELEASE Release 19.1      BUILD 19.1      UP20180418       09:06:34
/input,menust,tmp,''
/GST,ON
/PLO,INFO,3
/GRO,CURL,ON
/CPLANE,1
WPSTYLE,,,,,,,,0
finish
/prep7
~SATIN,yantong32mid,sat
/NOPR
/GO
APLOT
VPLOT
finish
/prep7
~SATIN,yantong32mid,sat,'D:\Yantong TQI',SURFACES
/NOPR
/GO
et,1,plane82
lesize,all,,,20
amesh,all
et,1,plane82
lesize,all,,,25
amesh,all
finish
/prep7
~SATIN,yantong32mid,sat,'D:\Yantong TQI',SURFACES
/NOPR
/GO
et,1,plane82
lesize,all,,,25
amesh,all
finish
/clear
/COM,ANSYS RELEASE Release 19.1      BUILD 19.1      UP20180418       09:52:12
/input,start,ans,'C:\Program Files\ANSYS Inc\v191\ANSYS\apdl\'
/prep7
et,1,beam188
mp,ex,1,3e10
mp,prxy,1,0.167
sectype,1,beam,mesh
secread,yantong32mid,,,mesh
k,1
k,2,10
k,100,5,5
l,1,2
lesize,all,,,200
latt,1,,1,,100,,1
lmesh,all
/eshape,1
eplot
finish
/prep7
~SATIN,yantong32mid,sat,'D:\Yantong TQI',SURFACES
/NOPR
/GO
et,1,plane82
lesize,all,,,25
amesh,all
secwrite,yantong32mid
FINISH
/CLE
/COM,ANSYS RELEASE Release 19.1      BUILD 19.1      UP20180418       09:52:49
/input,start,ans,'C:\Program Files\ANSYS Inc\v191\ANSYS\apdl\'
finish
/prep7
~SATIN,yantong32mid,sat,'D:\Yantong TQI',SURFACES
/NOPR
/GO
et,1,plane82
lesize,all,,,25
amesh,all
secwrite,yantong32mid
finish
/clear
/COM,ANSYS RELEASE Release 19.1      BUILD 19.1      UP20180418       09:53:09
/input,start,ans,'C:\Program Files\ANSYS Inc\v191\ANSYS\apdl\'
/prep7
et,1,beam188
mp,ex,1,3e10
mp,prxy,1,0.167
sectype,1,beam,mesh
secread,yantong32mid,,,mesh
k,1
k,2,10
k,100,5,5
l,1,2
lesize,all,,,200
latt,1,,1,,100,,1
lmesh,all
/eshape,1
eplot
finish
/clear
/COM,ANSYS RELEASE Release 19.1      BUILD 19.1      UP20180418       09:54:05
/input,start,ans,'C:\Program Files\ANSYS Inc\v191\ANSYS\apdl\'
/prep7
et,1,beam188
mp,ex,1,3e10
mp,prxy,1,0.167
sectype,1,beam,mesh
secread,yantong32mid,,,mesh
k,1
k,2,32e3
k,100,5,5
l,1,2
lesize,all,,,200
latt,1,,1,,100,,1
lmesh,all
/eshape,1
eplot
finish
/clear
/COM,ANSYS RELEASE Release 19.1      BUILD 19.1      UP20180418       09:54:42
/input,start,ans,'C:\Program Files\ANSYS Inc\v191\ANSYS\apdl\'
/prep7
et,1,beam188
mp,ex,1,3e10
mp,prxy,1,0.167
sectype,1,beam,mesh
secread,yantong32mid,,,mesh
k,1
k,2,32e3
k,100,5,5
l,1,2
lesize,all,,,500
latt,1,,1,,100,,1
lmesh,all
/eshape,1
eplot
finish
/clear
/COM,ANSYS RELEASE Release 19.1      BUILD 19.1      UP20180418       09:55:33
/input,start,ans,'C:\Program Files\ANSYS Inc\v191\ANSYS\apdl\'
/prep7
et,1,beam188
mp,ex,1,3e10
mp,prxy,1,0.167
sectype,1,beam,mesh
secread,yantong32mid,,,mesh
k,1
k,2,32e3
k,100,5,5
l,1,2
lesize,all,,,1000
latt,1,,1,,100,,1
lmesh,all
/eshape,1
eplot
finish
/clear
/COM,ANSYS RELEASE Release 19.1      BUILD 19.1      UP20180418       09:56:56
/input,start,ans,'C:\Program Files\ANSYS Inc\v191\ANSYS\apdl\'
/prep7
et,1,beam188
mp,ex,1,3e10
mp,prxy,1,0.167
sectype,1,beam,mesh
secread,yantong32mid,,,mesh
k,1
k,2,32e3
k,100,5,5
l,1,2
lesize,all,,1000,
latt,1,,1,,100,,1
lmesh,all
/eshape,1
eplot
finish
/clear
/COM,ANSYS RELEASE Release 19.1      BUILD 19.1      UP20180418       09:58:21
/input,start,ans,'C:\Program Files\ANSYS Inc\v191\ANSYS\apdl\'
/prep7
et,1,beam188
mp,ex,1,3e10
mp,prxy,1,0.167
sectype,1,beam,mesh
secread,yantong32mid,,,mesh
k,1
k,2,32e3
k,100,5,5
l,1,2
lesize,all,1000
latt,1,,1,,100,,1
lmesh,all
/eshape,1
eplot
/eshape,0
eplot
NPLOT
finish
/clear
/COM,ANSYS RELEASE Release 19.1      BUILD 19.1      UP20180418       13:36:08
/input,start,ans,'C:\Program Files\ANSYS Inc\v191\ANSYS\apdl\'
!!!!参数输入!!!!!
*SET,econcr,3e10
*SET,pr,0.167!混凝土材料参数
*SET,lsize,1000 !梁单元尺寸
*SET,l0,32600
*SET,l,31500
*SET,nsp,10 !标准跨径，计算跨径，跨数
*SET,lfa,660
*SET,lfb,670
*SET,lfn,600
*SET,nf,51
!扣件间距参数：la，lb，一般间距，均布扣件个数
!!!!!!!!!!!!!!!!
/prep7
et,1,beam188
mp,ex,1,econcr
mp,prxy,1,pr
sectype,1,beam,mesh
secread,yantong32mid,,,mesh
*do,ispan,1,nsp,1
!*if,ispan,gt,1 !创建一跨梁的两端
!*endif
n,2*ispan-1,l0*ispan-1,0,0
n,2*ispan,l0*ispan,0,0
*enddo
finish
/clear
/COM,ANSYS RELEASE Release 19.1      BUILD 19.1      UP20180418       13:37:36
/input,start,ans,'C:\Program Files\ANSYS Inc\v191\ANSYS\apdl\'
!!!!参数输入!!!!!
*SET,econcr,3e10
*SET,pr,0.167!混凝土材料参数
*SET,lsize,1000 !梁单元尺寸
*SET,l0,32600
*SET,l,31500
*SET,nsp,10 !标准跨径，计算跨径，跨数
*SET,lfa,660
*SET,lfb,670
*SET,lfn,600
*SET,nf,51
!扣件间距参数：la，lb，一般间距，均布扣件个数
!!!!!!!!!!!!!!!!
/prep7
et,1,beam188
mp,ex,1,econcr
mp,prxy,1,pr
sectype,1,beam,mesh
secread,yantong32mid,,,mesh
*do,ispan,1,nsp,1
!*if,ispan,gt,1 !创建一跨梁的两端
!*endif
n,2*ispan-1,l0*(ispan-1),0,0
n,2*ispan,l0*ispan,0,0
*enddo
finish
/clear
/COM,ANSYS RELEASE Release 19.1      BUILD 19.1      UP20180418       13:43:49
/input,start,ans,'C:\Program Files\ANSYS Inc\v191\ANSYS\apdl\'
!!!!参数输入!!!!!
*SET,econcr,3e10
*SET,pr,0.167!混凝土材料参数
*SET,lsize,1000 !梁单元尺寸
*SET,l0,32600
*SET,l,31500
*SET,nsp,10 !标准跨径，计算跨径，跨数
*SET,lfa,660
*SET,lfb,670
*SET,lfn,600
*SET,nf,51
!扣件间距参数：la，lb，一般间距，均布扣件段数
!!!!!!!!!!!!!!!!
/prep7
et,1,beam188
mp,ex,1,econcr
mp,prxy,1,pr
sectype,1,beam,mesh
secread,yantong32mid,,,mesh
*do,ispan,1,nsp,1
!*if,ispan,gt,1 !创建一跨梁的两端
!*endif
n,2*ispan-1,l0*(ispan-1),0,0
n,2*ispan,l0*ispan,0,0
n,1000+2*ispan-1,nx(2*ispan-1)+lfa/2,0,0
n,1000+2*ispan,nx(1000+2*ispan-1)+lfb,0,0
*enddo
FINISH
! /EXIT,NOSAV
/BATCH
/COM,ANSYS RELEASE Release 19.1      BUILD 19.1      UP20180418       07:33:23
/input,menust,tmp,''
/GST,ON
/PLO,INFO,3
/GRO,CURL,ON
/CPLANE,1
WPSTYLE,,,,,,,,0
finish
/clear
/COM,ANSYS RELEASE Release 19.1      BUILD 19.1      UP20180418       07:51:35
/input,start,ans,'C:\Program Files\ANSYS Inc\v191\ANSYS\apdl\'
!!!!参数输入!!!!!
*SET,econcr,3e10
*SET,pr,0.167!混凝土材料参数
*SET,lsize,1000 !梁单元尺寸
*SET,l0,32600
*SET,l,31500
*SET,nsp,10 !标准跨径，计算跨径，跨数
*SET,lfa,660
*SET,lfb,670
*SET,lfn,600
*SET,nf,51
!扣件间距参数：la，lb，一般间距，均布扣件段数
!!!!!!!!!!!!!!!!
/prep7
et,1,beam188
mp,ex,1,econcr
mp,prxy,1,pr
sectype,1,beam,mesh
secread,yantong32mid,,,mesh
*do,ispan,1,nsp,1
!*if,ispan,gt,1 !创建一跨梁的两端
!*endif
n,2*ispan-1,l0*(ispan-1),0,0
n,2*ispan,l0*ispan,0,0
n,1000+2*ispan-1,nx(2*ispan-1)+lfa/2,0,0
n,1000+2*ispan,nx(1000+2*ispan-1)+lfb,0,0
*enddo
finish
/clear
/COM,ANSYS RELEASE Release 19.1      BUILD 19.1      UP20180418       07:58:33
/input,start,ans,'C:\Program Files\ANSYS Inc\v191\ANSYS\apdl\'
!!!!参数输入!!!!!
*SET,econcr,3e10
*SET,pr,0.167!混凝土材料参数
*SET,lsize,1000 !梁单元尺寸
*SET,l0,32600
*SET,l,31500
*SET,nsp,10 !标准跨径，计算跨径，跨数
*SET,lfa,660
*SET,lfb,670
*SET,lfn,600
*SET,nf,51
!扣件间距参数：la，lb，一般间距，均布扣件段数
!!!!!!!!!!!!!!!!
/prep7
et,1,beam188
mp,ex,1,econcr
mp,prxy,1,pr
sectype,1,beam,mesh
secread,yantong32mid,,,mesh
*do,ispan,1,nsp,1
!*if,ispan,gt,1 !创建一跨梁的两端
!*endif
n,2*ispan-1,l0*(ispan-1),0,0
n,2*ispan,l0*ispan,0,0
n,1000*ispan+1,nx(2*ispan-1)+lfa/2,0,0
n,1000*ispan+2,nx(1000*ispan+1)+lfb,0,0
*do,inodeave,3,3+nf,1
n,1000*ispan+3,nx(1000*ispan+2)+lfn*(inodeave-2),0,0
*enddo
*enddo
finish
/clear
/COM,ANSYS RELEASE Release 19.1      BUILD 19.1      UP20180418       08:00:03
/input,start,ans,'C:\Program Files\ANSYS Inc\v191\ANSYS\apdl\'
!!!!参数输入!!!!!
*SET,econcr,3e10
*SET,pr,0.167!混凝土材料参数
*SET,lsize,1000 !梁单元尺寸
*SET,l0,32600
*SET,l,31500
*SET,nsp,10 !标准跨径，计算跨径，跨数
*SET,lfa,660
*SET,lfb,670
*SET,lfn,600
*SET,nf,51
!扣件间距参数：la，lb，一般间距，均布扣件段数
!!!!!!!!!!!!!!!!
/prep7
et,1,beam188
mp,ex,1,econcr
mp,prxy,1,pr
sectype,1,beam,mesh
secread,yantong32mid,,,mesh
*do,ispan,1,nsp,1
!*if,ispan,gt,1 !创建一跨梁的两端
!*endif
n,2*ispan-1,l0*(ispan-1),0,0
n,2*ispan,l0*ispan,0,0
n,1000*ispan+1,nx(2*ispan-1)+lfa/2,0,0
n,1000*ispan+2,nx(1000*ispan+1)+lfb,0,0
*do,inodeave,3,3+nf,1
n,1000*ispan+inodeave,nx(1000*ispan+2)+lfn*(inodeave-2),0,0
*enddo
*enddo
finish
/clear
/COM,ANSYS RELEASE Release 19.1      BUILD 19.1      UP20180418       08:01:57
/input,start,ans,'C:\Program Files\ANSYS Inc\v191\ANSYS\apdl\'
!!!!参数输入!!!!!
*SET,econcr,3e10
*SET,pr,0.167!混凝土材料参数
*SET,lsize,1000 !梁单元尺寸
*SET,l0,32600
*SET,l,31500
*SET,nsp,2 !标准跨径，计算跨径，跨数
*SET,lfa,660
*SET,lfb,670
*SET,lfn,600
*SET,nf,51
!扣件间距参数：la，lb，一般间距，均布扣件段数
!!!!!!!!!!!!!!!!
/prep7
et,1,beam188
mp,ex,1,econcr
mp,prxy,1,pr
sectype,1,beam,mesh
secread,yantong32mid,,,mesh
*do,ispan,1,nsp,1
!*if,ispan,gt,1 !创建一跨梁的两端
!*endif
n,2*ispan-1,l0*(ispan-1),0,0
n,2*ispan,l0*ispan,0,0
n,1000*ispan+1,nx(2*ispan-1)+lfa/2,0,0
n,1000*ispan+2,nx(1000*ispan+1)+lfb,0,0
*do,inodeave,3,2+nf,1
n,1000*ispan+inodeave,nx(1000*ispan+2)+lfn*(inodeave-2),0,0
*enddo
*enddo
nlist
finish
/clear
/COM,ANSYS RELEASE Release 19.1      BUILD 19.1      UP20180418       08:05:36
/input,start,ans,'C:\Program Files\ANSYS Inc\v191\ANSYS\apdl\'
!!!!参数输入!!!!!
*SET,econcr,3e10
*SET,pr,0.167!混凝土材料参数
*SET,lsize,1000 !梁单元尺寸
*SET,l0,32600
*SET,l,31500
*SET,nsp,2 !标准跨径，计算跨径，跨数
*SET,lfa,660
*SET,lfb,670
*SET,lfn,600
*SET,nf,51
!扣件间距参数：la，lb，一般间距，均布扣件段数
!!!!!!!!!!!!!!!!
/prep7
et,1,beam188
mp,ex,1,econcr
mp,prxy,1,pr
sectype,1,beam,mesh
secread,yantong32mid,,,mesh
*do,ispan,1,nsp,1
!*if,ispan,gt,1 !创建一跨梁的两端
!*endif
n,2*ispan-1,l0*(ispan-1),0,0
n,2*ispan,l0*ispan,0,0
n,1000*ispan+1,nx(2*ispan-1)+lfa/2,0,0
n,1000*ispan+2,nx(1000*ispan+1)+lfb,0,0
*do,inodeave,3,3+nf,1
n,1000*ispan+inodeave,nx(1000*ispan+2)+lfn*(inodeave-2),0,0
*enddo
n,1000*ispan+inodeave+1,nx(1000*ispan+inodeave)+lfb,0,0
*enddo
! nist
nlist
finish
/clear
/COM,ANSYS RELEASE Release 19.1      BUILD 19.1      UP20180418       08:08:31
/input,start,ans,'C:\Program Files\ANSYS Inc\v191\ANSYS\apdl\'
!!!!参数输入!!!!!
*SET,econcr,3e10
*SET,pr,0.167!混凝土材料参数
*SET,lsize,1000 !梁单元尺寸
*SET,l0,32600
*SET,l,31500
*SET,nsp,2 !标准跨径，计算跨径，跨数
*SET,lfa,660
*SET,lfb,670
*SET,lfn,600
*SET,nf,51
!扣件间距参数：la，lb，一般间距，均布扣件段数
!!!!!!!!!!!!!!!!
/prep7
et,1,beam188
mp,ex,1,econcr
mp,prxy,1,pr
sectype,1,beam,mesh
secread,yantong32mid,,,mesh
*do,ispan,1,nsp,1
!*if,ispan,gt,1 !创建一跨梁的两端
!*endif
n,2*ispan-1,l0*(ispan-1),0,0
n,2*ispan,l0*ispan,0,0
n,1000*ispan+1,nx(2*ispan-1)+lfa/2,0,0
n,1000*ispan+2,nx(1000*ispan+1)+lfb,0,0
*do,inodeave,3,2+nf,1  !此循环终点与nf的定义高度相关，疑似矛盾，有待核实
n,1000*ispan+inodeave,nx(1000*ispan+2)+lfn*(inodeave-2),0,0
*enddo
n,1000*ispan+inodeave+1,nx(1000*ispan+inodeave)+lfb,0,0
*enddo
finish
/clear
/COM,ANSYS RELEASE Release 19.1      BUILD 19.1      UP20180418       08:09:13
/input,start,ans,'C:\Program Files\ANSYS Inc\v191\ANSYS\apdl\'
!!!!参数输入!!!!!
*SET,econcr,3e10
*SET,pr,0.167!混凝土材料参数
*SET,lsize,1000 !梁单元尺寸
*SET,l0,32600
*SET,l,31500
*SET,nsp,10 !标准跨径，计算跨径，跨数
*SET,lfa,660
*SET,lfb,670
*SET,lfn,600
*SET,nf,51
!扣件间距参数：la，lb，一般间距，均布扣件段数
!!!!!!!!!!!!!!!!
/prep7
et,1,beam188
mp,ex,1,econcr
mp,prxy,1,pr
sectype,1,beam,mesh
secread,yantong32mid,,,mesh
*do,ispan,1,nsp,1
!*if,ispan,gt,1 !创建一跨梁的两端
!*endif
n,2*ispan-1,l0*(ispan-1),0,0
n,2*ispan,l0*ispan,0,0
n,1000*ispan+1,nx(2*ispan-1)+lfa/2,0,0
n,1000*ispan+2,nx(1000*ispan+1)+lfb,0,0
*do,inodeave,3,2+nf,1  !此循环终点与nf的定义高度相关，疑似矛盾，有待核实
n,1000*ispan+inodeave,nx(1000*ispan+2)+lfn*(inodeave-2),0,0
*enddo
n,1000*ispan+inodeave+1,nx(1000*ispan+inodeave)+lfb,0,0
*enddo
finish
/clear
/COM,ANSYS RELEASE Release 19.1      BUILD 19.1      UP20180418       09:05:11
/input,start,ans,'C:\Program Files\ANSYS Inc\v191\ANSYS\apdl\'
!!!!参数输入!!!!!
*SET,econcr,3e10
*SET,pr,0.167!混凝土材料参数
*SET,lsize,1000 !梁单元尺寸
*SET,l0,32600
*SET,l,31500
*SET,nsp,10 !标准跨径，计算跨径，跨数
*SET,lfa,660
*SET,lfb,670
*SET,lfn,600
*SET,nf,51
!扣件间距参数：la，lb，一般间距，均布扣件段数
!!!!!!!!!!!!!!!!
/prep7
et,1,beam188
mp,ex,1,econcr
mp,prxy,1,pr
sectype,1,beam,mesh
secread,yantong32mid,,,mesh
*do,ispan,1,nsp,1
!*if,ispan,gt,1 !创建一跨梁的两端
!*endif
n,2*ispan-1,l0*(ispan-1),0,0
n,2*ispan,l0*ispan,0,0
e,2*ispan-1,2*ispan
n,1000*ispan+1,nx(2*ispan-1)+lfa/2,0,0
e,2*ispan,1000*ispan+1
n,1000*ispan+2,nx(1000*ispan+1)+lfb,0,0
e,1000*ispan+1,1000*ispan+2
*do,inodeave,3,2+nf,1  !此循环终点与nf的定义高度相关，疑似矛盾，有待核实
n,1000*ispan+inodeave,nx(1000*ispan+2)+lfn*(inodeave-2),0,0
e,1000*ispan+inodeave-1,1000*ispan+inodeave
*enddo
n,1000*ispan+inodeave+1,nx(1000*ispan+inodeave)+lfb,0,0
e,1000*ispan+inodeave,1000*ispan+inodeave+1
e,1000*ispan+inodeave+1,2*ispan
*enddo
finish
/clear
/COM,ANSYS RELEASE Release 19.1      BUILD 19.1      UP20180418       09:23:18
/input,start,ans,'C:\Program Files\ANSYS Inc\v191\ANSYS\apdl\'
!!!!参数输入!!!!!
*SET,econcr,3e10
*SET,pr,0.167!混凝土材料参数
*SET,lsize,1000 !梁单元尺寸
*SET,l0,32600
*SET,l,31500
*SET,nsp,1 !标准跨径，计算跨径，跨数
*SET,lbear,550 !支座中心距梁端
*SET,lfa,660
*SET,lfb,670
*SET,lfn,600
*SET,nf,51
!扣件间距参数：la，lb，一般间距，均布扣件段数
!!!!!!!!!!!!!!!!
/prep7
et,1,beam188
mp,ex,1,econcr
mp,prxy,1,pr
sectype,1,beam,mesh
secread,yantong32mid,,,mesh
*do,ispan,1,nsp,1
!*if,ispan,gt,1 !创建一跨梁的两端
!*endif
n,2*ispan-1,l0*(ispan-1),0,0 !梁左端结点
n,2*ispan,l0*ispan,0,0 !梁右端结点
n,1000*ispan+1,nx(2*ispan-1)+lfa/2,0,0 !距梁左端lfa/2的结点
e,2*ispan-1,1000*ispan+1 !连接梁最左边一段单元(长度lfa/2)
n,1000*ispan+2,nx(2*ispan-1)+lbear !左支座中心线结点
e,1000*ispan+1,1000*ispan+2
n,1000*ispan+3,nx(1000*ispan+1)+lfb,0,0
e,1000*ispan+2,1000*ispan+3
*do,inodeave,4,nf+3,1  !此循环终点与nf的定义高度相关，疑似矛盾，有待核实
n,1000*ispan+inodeave,nx(1000*ispan+2)+lfn*(inodeave-2),0,0
e,1000*ispan+inodeave-1,1000*ispan+inodeave
*enddo
n,1000*ispan+inodeave+1,nx(1000*ispan+inodeave)+lfb,0,0
e,1000*ispan+inodeave,1000*ispan+inodeave+1
n,1000*ispan+inodeave+2,nx(2*ispan)-lbear,0,0
e,1000*ispan+inodeave+1,1000*ispan+inodeave+2
e,1000*ispan+inodeave+2,2*ispan
*enddo
nlist
finish
/clear
/COM,ANSYS RELEASE Release 19.1      BUILD 19.1      UP20180418       09:27:04
/input,start,ans,'C:\Program Files\ANSYS Inc\v191\ANSYS\apdl\'
!!!!参数输入!!!!!
*SET,econcr,3e10
*SET,pr,0.167!混凝土材料参数
*SET,lsize,1000 !梁单元尺寸
*SET,l0,32600
*SET,l,31500
*SET,nsp,1 !标准跨径，计算跨径，跨数
*SET,lbear,550 !支座中心距梁端
*SET,lfa,660
*SET,lfb,670
*SET,lfn,600
*SET,nf,51
!扣件间距参数：la，lb，一般间距，均布扣件段数
!!!!!!!!!!!!!!!!
/prep7
et,1,beam188
mp,ex,1,econcr
mp,prxy,1,pr
sectype,1,beam,mesh
secread,yantong32mid,,,mesh
*do,ispan,1,nsp,1
!*if,ispan,gt,1 !创建一跨梁的两端
!*endif
n,2*ispan-1,l0*(ispan-1),0,0 !梁左端结点
n,2*ispan,l0*ispan,0,0 !梁右端结点
n,1000*ispan+1,nx(2*ispan-1)+lfa/2,0,0 !距梁左端lfa/2的结点
e,2*ispan-1,1000*ispan+1 !连接梁最左边一段单元(长度lfa/2)
n,1000*ispan+2,nx(2*ispan-1)+lbear !左支座中心线结点
e,1000*ispan+1,1000*ispan+2
n,1000*ispan+3,nx(1000*ispan+1)+lfb,0,0
e,1000*ispan+2,1000*ispan+3
*do,inodeave,4,nf+3,1  !此循环终点与nf的定义高度相关，疑似矛盾，有待核实
n,1000*ispan+inodeave,nx(1000*ispan+3)+lfn*(inodeave-3),0,0
e,1000*ispan+inodeave-1,1000*ispan+inodeave
*enddo
n,1000*ispan+inodeave+1,nx(1000*ispan+inodeave)+lfb,0,0
e,1000*ispan+inodeave,1000*ispan+inodeave+1
n,1000*ispan+inodeave+2,nx(2*ispan)-lbear,0,0
e,1000*ispan+inodeave+1,1000*ispan+inodeave+2
e,1000*ispan+inodeave+2,2*ispan
*enddo
nlist
elist
finish
/clear
/COM,ANSYS RELEASE Release 19.1      BUILD 19.1      UP20180418       09:30:21
/input,start,ans,'C:\Program Files\ANSYS Inc\v191\ANSYS\apdl\'
!!!!参数输入!!!!!
*SET,econcr,3e10
*SET,pr,0.167!混凝土材料参数
*SET,lsize,1000 !梁单元尺寸
*SET,l0,32600
*SET,l,31500
*SET,nsp,3 !标准跨径，计算跨径，跨数
*SET,lbear,550 !支座中心距梁端
*SET,lfa,660
*SET,lfb,670
*SET,lfn,600
*SET,nf,51
!扣件间距参数：la，lb，一般间距，均布扣件段数
!!!!!!!!!!!!!!!!
/prep7
et,1,beam188
mp,ex,1,econcr
mp,prxy,1,pr
sectype,1,beam,mesh
secread,yantong32mid,,,mesh
*do,ispan,1,nsp,1
!*if,ispan,gt,1 !创建一跨梁的两端
!*endif
n,2*ispan-1,l0*(ispan-1),0,0 !梁左端结点
n,2*ispan,l0*ispan,0,0 !梁右端结点
n,1000*ispan+1,nx(2*ispan-1)+lfa/2,0,0 !距梁左端lfa/2的结点
e,2*ispan-1,1000*ispan+1 !连接梁最左边一段单元(长度lfa/2)
n,1000*ispan+2,nx(2*ispan-1)+lbear !左支座中心线结点
e,1000*ispan+1,1000*ispan+2
n,1000*ispan+3,nx(1000*ispan+1)+lfb,0,0
e,1000*ispan+2,1000*ispan+3
*do,inodeave,4,nf+3,1  !此循环终点与nf的定义高度相关，疑似矛盾，有待核实
n,1000*ispan+inodeave,nx(1000*ispan+3)+lfn*(inodeave-3),0,0
e,1000*ispan+inodeave-1,1000*ispan+inodeave
*enddo
n,1000*ispan+inodeave+1,nx(1000*ispan+inodeave)+lfb,0,0
e,1000*ispan+inodeave,1000*ispan+inodeave+1
n,1000*ispan+inodeave+2,nx(2*ispan)-lbear,0,0
e,1000*ispan+inodeave+1,1000*ispan+inodeave+2
e,1000*ispan+inodeave+2,2*ispan
*enddo
elist
finish
/clear
/COM,ANSYS RELEASE Release 19.1      BUILD 19.1      UP20180418       11:25:40
/input,start,ans,'C:\Program Files\ANSYS Inc\v191\ANSYS\apdl\'
!!!!参数输入!!!!!
*SET,econcr,3e10
*SET,pr,0.167!混凝土材料参数
*SET,lsize,1000 !梁单元尺寸
*SET,l0,32600
*SET,l,31500
*SET,nsp,3 !标准跨径，计算跨径，跨数
*SET,lbear,550 !支座中心距梁端
*SET,lfa,660
*SET,lfb,670
*SET,lfn,600
*SET,nf,51
!扣件间距参数：la，lb，一般间距，均布扣件段数
!!!!!!!!!!!!!!!!
/prep7
et,1,beam188
mp,ex,1,econcr
mp,prxy,1,pr
sectype,1,beam,mesh
secread,yantong32mid,,,mesh
*do,ispan,1,nsp,1
!*if,ispan,gt,1 !创建一跨梁的两端
!*endif
n,2*ispan-1,l0*(ispan-1),0,0 !梁左端结点
n,2*ispan,l0*ispan,0,0 !梁右端结点
n,1000*ispan+1,nx(2*ispan-1)+lfa/2,0,0 !距梁左端lfa/2的结点
e,2*ispan-1,1000*ispan+1 !连接梁最左边一段单元(长度lfa/2)
n,1000*ispan+2,nx(2*ispan-1)+lbear !左支座中心线结点
d,1000*ispan+2,ux,,,,,uy,uz
e,1000*ispan+1,1000*ispan+2
n,1000*ispan+3,nx(1000*ispan+1)+lfb,0,0
e,1000*ispan+2,1000*ispan+3
*do,inodeave,4,nf+3,1  !此循环终点与nf的定义高度相关，疑似矛盾，有待核实
n,1000*ispan+inodeave,nx(1000*ispan+3)+lfn*(inodeave-3),0,0
e,1000*ispan+inodeave-1,1000*ispan+inodeave
*enddo
n,1000*ispan+inodeave+1,nx(1000*ispan+inodeave)+lfb,0,0
e,1000*ispan+inodeave,1000*ispan+inodeave+1
n,1000*ispan+inodeave+2,nx(2*ispan)-lbear,0,0 !右支座中心线结点
d,1000*ispan+inodeave+2,uy,,,,,uz
e,1000*ispan+inodeave+1,1000*ispan+inodeave+2
e,1000*ispan+inodeave+2,2*ispan
*enddo
/eshape,0
eplot
/eshape,1
eplot
finish
/clear
/COM,ANSYS RELEASE Release 19.1      BUILD 19.1      UP20180418       11:28:01
/input,start,ans,'C:\Program Files\ANSYS Inc\v191\ANSYS\apdl\'
/prep7
~SATIN,yantong32mid,sat,'D:\Yantong TQI',SURFACES
/NOPR
/GO
et,1,plane82
lesize,all,,,25
amesh,all
secplot,1
seclist
/BATCH
/COM,ANSYS RELEASE Release 19.1      BUILD 19.1      UP20180418       11:29:49
/input,menust,tmp,''
/GST,ON
/PLO,INFO,3
/GRO,CURL,ON
/CPLANE,1
WPSTYLE,,,,,,,,0
finish
/clear
/COM,ANSYS RELEASE Release 19.1      BUILD 19.1      UP20180418       11:29:59
/input,start,ans,'C:\Program Files\ANSYS Inc\v191\ANSYS\apdl\'
!!!!参数输入!!!!!
*SET,econcr,3e10
*SET,pr,0.167!混凝土材料参数
*SET,lsize,1000 !梁单元尺寸
*SET,l0,32600
*SET,l,31500
*SET,nsp,3 !标准跨径，计算跨径，跨数
*SET,lbear,550 !支座中心距梁端
*SET,lfa,660
*SET,lfb,670
*SET,lfn,600
*SET,nf,51
!扣件间距参数：la，lb，一般间距，均布扣件段数
!!!!!!!!!!!!!!!!
/prep7
et,1,beam188
mp,ex,1,econcr
mp,prxy,1,pr
sectype,1,beam,mesh
secread,yantong32mid,,,mesh
secplot,1
finish
/clear
/COM,ANSYS RELEASE Release 19.1      BUILD 19.1      UP20180418       11:32:08
/input,start,ans,'C:\Program Files\ANSYS Inc\v191\ANSYS\apdl\'
!!!!参数输入!!!!!
*SET,econcr,3e10
*SET,pr,0.167!混凝土材料参数
*SET,lsize,1000 !梁单元尺寸
*SET,l0,32600
*SET,l,31500
*SET,nsp,3 !标准跨径，计算跨径，跨数
*SET,lbear,550 !支座中心距梁端
*SET,lfa,660
*SET,lfb,670
*SET,lfn,600
*SET,nf,51
!扣件间距参数：la，lb，一般间距，均布扣件段数
!!!!!!!!!!!!!!!!
/prep7
et,1,beam188
mp,ex,1,econcr
mp,prxy,1,pr
sectype,1,beam,mesh
secread,yantong32mid,,,mesh
*do,ispan,1,nsp,1
!*if,ispan,gt,1 !创建一跨梁的两端
!*endif
n,2*ispan-1,l0*(ispan-1),0,0 !梁左端结点
n,2*ispan,l0*ispan,0,0 !梁右端结点
n,1000*ispan+1,nx(2*ispan-1)+lfa/2,0,0 !距梁左端lfa/2的结点
e,2*ispan-1,1000*ispan+1 !连接梁最左边一段单元(长度lfa/2)
n,1000*ispan+2,nx(2*ispan-1)+lbear !左支座中心线结点
d,1000*ispan+2,ux,,,,,uy,uz
e,1000*ispan+1,1000*ispan+2
n,1000*ispan+3,nx(1000*ispan+1)+lfb,0,0
e,1000*ispan+2,1000*ispan+3
*do,inodeave,4,nf+3,1  !此循环终点与nf的定义高度相关，疑似矛盾，有待核实
n,1000*ispan+inodeave,nx(1000*ispan+3)+lfn*(inodeave-3),0,0
e,1000*ispan+inodeave-1,1000*ispan+inodeave
*enddo
n,1000*ispan+inodeave+1,nx(1000*ispan+inodeave)+lfb,0,0
e,1000*ispan+inodeave,1000*ispan+inodeave+1
n,1000*ispan+inodeave+2,nx(2*ispan)-lbear,0,0 !右支座中心线结点
d,1000*ispan+inodeave+2,uy,,,,,uz
e,1000*ispan+inodeave+1,1000*ispan+inodeave+2
e,1000*ispan+inodeave+2,2*ispan
*enddo
/eshape,0
eplot
/eshape,1
eplot
finish
/clear
/COM,ANSYS RELEASE Release 19.1      BUILD 19.1      UP20180418       12:38:33
/input,start,ans,'C:\Program Files\ANSYS Inc\v191\ANSYS\apdl\'
!!!!参数输入!!!!!
*SET,econcr,3e10
*SET,pr,0.167!混凝土材料参数
*SET,lsize,1000 !梁单元尺寸
*SET,l0,32600
*SET,l,31500
*SET,nsp,3 !标准跨径，计算跨径，跨数
*SET,lbear,550 !支座中心距梁端
*SET,lfa,660
*SET,lfb,670
*SET,lfn,600
*SET,nf,51
!扣件间距参数：la，lb，一般间距，均布扣件段数
!!!!!!!!!!!!!!!!
/prep7
et,1,beam188
mp,ex,1,econcr
mp,prxy,1,pr
sectype,1,beam,mesh
secread,yantong32mid,,,mesh
*do,ispan,1,nsp,1
!*if,ispan,gt,1 !创建一跨梁的两端
!*endif
n,2*ispan-1,l0*(ispan-1),0,0,,-90 !梁左端结点
n,2*ispan,l0*ispan,0,0,,-90 !梁右端结点
n,1000*ispan+1,nx(2*ispan-1)+lfa/2,0,0,,-90 !距梁左端lfa/2的结点
e,2*ispan-1,1000*ispan+1 !连接梁最左边一段单元(长度lfa/2)
n,1000*ispan+2,nx(2*ispan-1)+lbear,0,0,,-90 !左支座中心线结点
d,1000*ispan+2,ux,,,,,uy,uz
e,1000*ispan+1,1000*ispan+2
n,1000*ispan+3,nx(1000*ispan+1)+lfb,0,0,,-90
e,1000*ispan+2,1000*ispan+3
*do,inodeave,4,nf+3,1  !此循环终点与nf的定义高度相关，疑似矛盾，有待核实
n,1000*ispan+inodeave,nx(1000*ispan+3)+lfn*(inodeave-3),0,0,,-90
e,1000*ispan+inodeave-1,1000*ispan+inodeave
*enddo
n,1000*ispan+inodeave+1,nx(1000*ispan+inodeave)+lfb,0,0,,-90
e,1000*ispan+inodeave,1000*ispan+inodeave+1
n,1000*ispan+inodeave+2,nx(2*ispan)-lbear,0,0,,-90 !右支座中心线结点
d,1000*ispan+inodeave+2,uy,,,,,uz
e,1000*ispan+inodeave+1,1000*ispan+inodeave+2
e,1000*ispan+inodeave+2,2*ispan
*enddo
/eshape,1
eplot
finish
/clear
/COM,ANSYS RELEASE Release 19.1      BUILD 19.1      UP20180418       12:44:06
/input,start,ans,'C:\Program Files\ANSYS Inc\v191\ANSYS\apdl\'
!!!!参数输入!!!!!
*SET,econcr,3e10
*SET,pr,0.167!混凝土材料参数
*SET,lsize,1000 !梁单元尺寸
*SET,l0,32600
*SET,l,31500
*SET,nsp,1 !标准跨径，计算跨径，跨数
*SET,lbear,550 !支座中心距梁端
*SET,lfa,660
*SET,lfb,670
*SET,lfn,600
*SET,nf,51
!扣件间距参数：la，lb，一般间距，均布扣件段数
!!!!!!!!!!!!!!!!
/prep7
et,1,beam188
mp,ex,1,econcr
mp,prxy,1,pr
sectype,1,beam,mesh
secread,yantong32mid,,,mesh
*do,ispan,1,nsp,1
!*if,ispan,gt,1 !创建一跨梁的两端
!*endif
n,20000,0,1,0
n,2*ispan-1,l0*(ispan-1),0,0 !梁左端结点
n,2*ispan,l0*ispan,0,0 !梁右端结点
n,1000*ispan+1,nx(2*ispan-1)+lfa/2,0,0 !距梁左端lfa/2的结点
e,2*ispan-1,1000*ispan+1,20000 !连接梁最左边一段单元(长度lfa/2)
n,1000*ispan+2,nx(2*ispan-1)+lbear,0,0 !左支座中心线结点
d,1000*ispan+2,ux,,,,,uy,uz
e,1000*ispan+1,1000*ispan+2,20000
n,1000*ispan+3,nx(1000*ispan+1)+lfb,0,0
e,1000*ispan+2,1000*ispan+3,20000
*do,inodeave,4,nf+3,1  !此循环终点与nf的定义高度相关，疑似矛盾，有待核实
n,1000*ispan+inodeave,nx(1000*ispan+3)+lfn*(inodeave-3),0,0
e,1000*ispan+inodeave-1,1000*ispan+inodeave,20000
*enddo
n,1000*ispan+inodeave+1,nx(1000*ispan+inodeave)+lfb,0,0
e,1000*ispan+inodeave,1000*ispan+inodeave+1,20000
n,1000*ispan+inodeave+2,nx(2*ispan)-lbear,0,0 !右支座中心线结点
d,1000*ispan+inodeave+2,uy,,,,,uz
e,1000*ispan+inodeave+1,1000*ispan+inodeave+2,20000
e,1000*ispan+inodeave+2,2*ispan,20000
*enddo
/eshape,1
eplot
finish
/clear
/COM,ANSYS RELEASE Release 19.1      BUILD 19.1      UP20180418       12:45:18
/input,start,ans,'C:\Program Files\ANSYS Inc\v191\ANSYS\apdl\'
!!!!参数输入!!!!!
*SET,econcr,3e10
*SET,pr,0.167!混凝土材料参数
*SET,lsize,1000 !梁单元尺寸
*SET,l0,32600
*SET,l,31500
*SET,nsp,10 !标准跨径，计算跨径，跨数
*SET,lbear,550 !支座中心距梁端
*SET,lfa,660
*SET,lfb,670
*SET,lfn,600
*SET,nf,51
!扣件间距参数：la，lb，一般间距，均布扣件段数
!!!!!!!!!!!!!!!!
/prep7
et,1,beam188
mp,ex,1,econcr
mp,prxy,1,pr
sectype,1,beam,mesh
secread,yantong32mid,,,mesh
*do,ispan,1,nsp,1
!*if,ispan,gt,1 !创建一跨梁的两端
!*endif
n,20000,0,1,0 !梁单元坐标系定位结点(决定截面方向)
n,2*ispan-1,l0*(ispan-1),0,0 !梁左端结点
n,2*ispan,l0*ispan,0,0 !梁右端结点
n,1000*ispan+1,nx(2*ispan-1)+lfa/2,0,0 !距梁左端lfa/2的结点
e,2*ispan-1,1000*ispan+1,20000 !连接梁最左边一段单元(长度lfa/2)
n,1000*ispan+2,nx(2*ispan-1)+lbear,0,0 !左支座中心线结点
d,1000*ispan+2,ux,,,,,uy,uz
e,1000*ispan+1,1000*ispan+2,20000
n,1000*ispan+3,nx(1000*ispan+1)+lfb,0,0
e,1000*ispan+2,1000*ispan+3,20000
*do,inodeave,4,nf+3,1  !此循环终点与nf的定义高度相关，疑似矛盾，有待核实
n,1000*ispan+inodeave,nx(1000*ispan+3)+lfn*(inodeave-3),0,0
e,1000*ispan+inodeave-1,1000*ispan+inodeave,20000
*enddo
n,1000*ispan+inodeave+1,nx(1000*ispan+inodeave)+lfb,0,0
e,1000*ispan+inodeave,1000*ispan+inodeave+1,20000
n,1000*ispan+inodeave+2,nx(2*ispan)-lbear,0,0 !右支座中心线结点
d,1000*ispan+inodeave+2,uy,,,,,uz
e,1000*ispan+inodeave+1,1000*ispan+inodeave+2,20000
e,1000*ispan+inodeave+2,2*ispan,20000
*enddo
/eshape,1
eplot
/eshape,0
eplot
FINISH
! /EXIT,NOSAV
/BATCH
/COM,ANSYS RELEASE Release 19.1      BUILD 19.1      UP20180418       13:46:25
/input,menust,tmp,''
/GST,ON
/PLO,INFO,3
/GRO,CURL,ON
/CPLANE,1
WPSTYLE,,,,,,,,0
buildbridge
/COM,ANSYS RELEASE Release 19.1      BUILD 19.1      UP20180418       13:46:34
/eshape,1
genbeamsec
/COM,ANSYS RELEASE Release 19.1      BUILD 19.1      UP20180418       13:49:09
genbeamsec
/COM,ANSYS RELEASE Release 19.1      BUILD 19.1      UP20180418       13:49:40
genbeamsec
/COM,ANSYS RELEASE Release 19.1      BUILD 19.1      UP20180418       13:50:17
genbeamsec
/BATCH
/COM,ANSYS RELEASE Release 19.1      BUILD 19.1      UP20180418       13:51:57
/input,menust,tmp,''
/GST,ON
/PLO,INFO,3
/GRO,CURL,ON
/CPLANE,1
WPSTYLE,,,,,,,,0
genbeamsec
/BATCH
/COM,ANSYS RELEASE Release 19.1      BUILD 19.1      UP20180418       13:54:39
/input,menust,tmp,''
/GST,ON
/PLO,INFO,3
/GRO,CURL,ON
/CPLANE,1
WPSTYLE,,,,,,,,0
genbeamsec
/BATCH
/COM,ANSYS RELEASE Release 19.1      BUILD 19.1      UP20180418       14:01:53
/input,menust,tmp,''
/GST,ON
/PLO,INFO,3
/GRO,CURL,ON
/CPLANE,1
WPSTYLE,,,,,,,,0
genbeamsec
/COM,ANSYS RELEASE Release 19.1      BUILD 19.1      UP20180418       14:02:11
genbeamsec
/COM,ANSYS RELEASE Release 19.1      BUILD 19.1      UP20180418       14:02:41
buildbridge
/COM,ANSYS RELEASE Release 19.1      BUILD 19.1      UP20180418       14:02:47
/eshape,1
*GET,secarea,SECP,1,prop,area !获取截面面积
buildbridge
/COM,ANSYS RELEASE Release 19.1      BUILD 19.1      UP20180418       14:34:25
solmode
/SOLU
FINISH
/POST1
SET,LIST
SET,NEXT
SET,NEXT
SET,NEXT
SET,LIST
SET,NEXT
SET,FIRST
SET,FIRST
SET,NEXT
SET,NEXT
SET,NEXT
buildbridge
/COM,ANSYS RELEASE Release 19.1      BUILD 19.1      UP20180418       14:42:32
FINISH
/POST1
SET,LIST
SET,FIRST
SET,NEXT
buildbridge
/COM,ANSYS RELEASE Release 19.1      BUILD 19.1      UP20180418       14:43:17
solmode
/POST1
SET,FIRST
SET,NEXT
SET,LIST
SET,FIRST                                    ! 选取第一阶
PLDISP,2                               ! 显示变形
SET,NEXT
SET,NEXT
SET,NEXT
SET,NEXT
SET,NEXT
SET,NEXT
SET,LIST
buildbridge
/COM,ANSYS RELEASE Release 19.1      BUILD 19.1      UP20180418       14:48:15
solmode
/POST1
SET,LIST
! Ansys_to_Modal Superposition_Bridge
/input,Ansys_to_Modal Superposition_Bridge,mac
Ansys_to_MSBdat.mac
buildbridge
/COM,ANSYS RELEASE Release 19.1      BUILD 19.1      UP20180418       15:21:21
nlist
Ansys_to_MSBdat.mac
Ansys_to_MSBdat_cont.mac
/BATCH
/COM,ANSYS RELEASE Release 19.1      BUILD 19.1      UP20180418       15:26:35
/input,menust,tmp,''
/GST,ON
/PLO,INFO,3
/GRO,CURL,ON
/CPLANE,1
WPSTYLE,,,,,,,,0
buildbridge
/COM,ANSYS RELEASE Release 19.1      BUILD 19.1      UP20180418       15:26:48
solmode
Ansys_to_MSBdat_cont.mac
Ansys_to_MSBdat.mac
Ansys_to_MSBdat_cont.mac
/BATCH
/COM,ANSYS RELEASE Release 19.1      BUILD 19.1      UP20180418       15:30:20
/input,menust,tmp,''
/GST,ON
/PLO,INFO,3
/GRO,CURL,ON
/CPLANE,1
WPSTYLE,,,,,,,,0
buildbridge
/COM,ANSYS RELEASE Release 19.1      BUILD 19.1      UP20180418       15:30:29
solmode
Ansys_to_MSBdat_cont.mac
Ansys_to_MSBdat.mac
Ansys_to_MSBdat_cont.mac
Ansys_to_MSBdat_Post.mac
buildbridge
/COM,ANSYS RELEASE Release 19.1      BUILD 19.1      UP20180418       10:17:04
solmode
/POST1
SET,LIST
/eshape,1
eplot
/BATCH
/COM,ANSYS RELEASE Release 19.1      BUILD 19.1      UP20180418       10:20:23
/input,menust,tmp,''
/GST,ON
/PLO,INFO,3
/GRO,CURL,ON
/CPLANE,1
WPSTYLE,,,,,,,,0
buildbridge
/COM,ANSYS RELEASE Release 19.1      BUILD 19.1      UP20180418       10:20:47
/PSF,DEFA, ,1,0,1
/PBF,DEFA, ,1
/PSYMB,CS,0
/PSYMB,NDIR,0
/PSYMB,ESYS,0
/PSYMB,LDIV,0
/PSYMB,LDIR,0
/PSYMB,ADIR,0
/PSYMB,ECON,0
/PSYMB,XNODE,0
/PSYMB,DOT,1
/PSYMB,PCONV,
/PSYMB,LAYR,0
/PSYMB,FBCS,0
/PBC,ALL, ,1
FINISH
/POST1
SET,LIST
SET,LIST
/PSF,DEFA, ,1,0,1
/PBF,DEFA, ,1
/PSYMB,CS,0
/PSYMB,NDIR,0
/PSYMB,ESYS,0
/PSYMB,LDIV,0
/PSYMB,LDIR,0
/PSYMB,ADIR,0
/PSYMB,ECON,0
/PSYMB,XNODE,0
/PSYMB,DOT,1
/PSYMB,PCONV,
/PSYMB,LAYR,0
/PSYMB,FBCS,0
/PBC,ALL, ,1
buildbridge
/COM,ANSYS RELEASE Release 19.1      BUILD 19.1      UP20180418       11:54:03
/PSF,DEFA, ,1,0,1
/PBF,DEFA, ,1
/PSYMB,CS,0
/PSYMB,NDIR,0
/PSYMB,ESYS,0
/PSYMB,LDIV,0
/PSYMB,LDIR,0
/PSYMB,ADIR,0
/PSYMB,ECON,0
/PSYMB,XNODE,0
/PSYMB,DOT,1
/PSYMB,PCONV,
/PSYMB,LAYR,0
/PSYMB,FBCS,0
/PBC,ALL, ,1
elist
elist
buildbridge
/COM,ANSYS RELEASE Release 19.1      BUILD 19.1      UP20180418       11:58:08
NPLOT
/NUMBER,0
buildbridge
/COM,ANSYS RELEASE Release 19.1      BUILD 19.1      UP20180418       12:00:53
NPLOT
/NUMBER,0
buildbridge
/COM,ANSYS RELEASE Release 19.1      BUILD 19.1      UP20180418       12:10:02
NPLOT
/NUMBER,0
buildbridge
/COM,ANSYS RELEASE Release 19.1      BUILD 19.1      UP20180418       12:11:48
NPLOT
/NUMBER,0
nlist
/PSF,DEFA, ,1,0,1
/PBF,DEFA, ,1
/PSYMB,CS,0
/PSYMB,NDIR,0
/PSYMB,ESYS,0
/PSYMB,LDIV,0
/PSYMB,LDIR,0
/PSYMB,ADIR,0
/PSYMB,ECON,0
/PSYMB,XNODE,0
/PSYMB,DOT,1
/PSYMB,PCONV,
/PSYMB,LAYR,0
/PSYMB,FBCS,0
/PBC,ALL, ,1
solmode
/POST26
FILE,'Yantong32','rst','.'
NUMVAR,200
SOLU,191,NCMIT
STORE,MERGE
FILLDATA,191,,,,1,1
REALVAR,191,191
FINISH
/POST1
SET,LIST
SET,FIRST                                    ! 选取第一阶
PLDISP,2                               ! 显示变形
SET,NEXT
SET,NEXT
SET,NEXT
SET,FIRST
/eshape,0
eplot
elist
buildbridge
/COM,ANSYS RELEASE Release 19.1      BUILD 19.1      UP20180418       12:18:19
elist
solmode
/POST1
SET,LIST
SET,NEXT
buildbridge
/COM,ANSYS RELEASE Release 19.1      BUILD 19.1      UP20180418       12:19:52
solmode
! SET,FIRST
! PLDISP,2
! SET,FIRST
! PLDISP,2
/POST1
SET,LIST
!读取频率信息
!/EFACET,1  $                         !定义单元边界分段数目
!SET,FIRST $
SET,FIRST                                    ! 选取第一阶
PLDISP,2                               ! 显示变形
buildbridge
/COM,ANSYS RELEASE Release 19.1      BUILD 19.1      UP20180418       12:21:41
solmode
/POST1
SET,LIST
PRRSOL,FY
SET,LIST
buildbridge
/COM,ANSYS RELEASE Release 19.1      BUILD 19.1      UP20180418       13:05:58
solmode
/POST1
PRRSOL,FY
! antype,0
! solce
! solve
FINISH
/SOL
antype,0
solve
FINISH
/POST1
PRRSOL,FY
buildbridge
/COM,ANSYS RELEASE Release 19.1      BUILD 19.1      UP20180418       13:08:26
solstac
FINISH
/POST1
PRRSOL,FY
buildbridge
/COM,ANSYS RELEASE Release 19.1      BUILD 19.1      UP20180418       13:10:23
solstac
FINISH
/POST1
PRRSOL,FY
buildbridge
/COM,ANSYS RELEASE Release 19.1      BUILD 19.1      UP20180418       13:14:52
solmode
/POST1
SET,LIST
buildbridge
/COM,ANSYS RELEASE Release 19.1      BUILD 19.1      UP20180418       14:29:11
solmode
/POST1
SET,LIST
buildbridge
/COM,ANSYS RELEASE Release 19.1      BUILD 19.1      UP20180418       14:33:35
solmode
buildbridge
/COM,ANSYS RELEASE Release 19.1      BUILD 19.1      UP20180418       15:01:02
solmode
buildbridge
/COM,ANSYS RELEASE Release 19.1      BUILD 19.1      UP20180418       15:01:47
solmode
buildbridge
/COM,ANSYS RELEASE Release 19.1      BUILD 19.1      UP20180418       16:03:13
solmode
Ansys_to_MSBdat.mac
Ansys_to_MSBdat_cont.mac
Ansys_to_MSBdat_Post.mac
/BATCH
/COM,ANSYS RELEASE Release 19.1      BUILD 19.1      UP20180418       11:23:33
/input,menust,tmp,''
/GST,ON
/PLO,INFO,3
/GRO,CURL,ON
/CPLANE,1
WPSTYLE,,,,,,,,0
genbeamsec
/COM,ANSYS RELEASE Release 19.1      BUILD 19.1      UP20180418       11:23:41
buildbridge
/COM,ANSYS RELEASE Release 19.1      BUILD 19.1      UP20180418       11:24:26
buildbridge
/COM,ANSYS RELEASE Release 19.1      BUILD 19.1      UP20180418       11:54:16
solmode
!求解
buildbridge
/COM,ANSYS RELEASE Release 19.1      BUILD 19.1      UP20180418       11:55:09
genbeamsec
/COM,ANSYS RELEASE Release 19.1      BUILD 19.1      UP20180418       11:55:29
buildbridge
/COM,ANSYS RELEASE Release 19.1      BUILD 19.1      UP20180418       11:55:33
solmode
/POST1
PLDISP,0
FINISH
! /EXIT,ALL
/BATCH
/COM,ANSYS RELEASE Release 19.1      BUILD 19.1      UP20180418       14:25:07
/input,menust,tmp,''
/GST,ON
/PLO,INFO,3
/GRO,CURL,ON
/CPLANE,1
WPSTYLE,,,,,,,,0
EPLOT
esel,all
buildbridge
/COM,ANSYS RELEASE Release 19.1      BUILD 19.1      UP20180418       14:25:34
/PSF,DEFA, ,1,0,1
/PBF,DEFA, ,1
/PSYMB,CS,0
/PSYMB,NDIR,0
/PSYMB,ESYS,0
/PSYMB,LDIV,0
/PSYMB,LDIR,0
/PSYMB,ADIR,0
/PSYMB,ECON,0
/PSYMB,XNODE,0
/PSYMB,DOT,1
/PSYMB,PCONV,
/PSYMB,LAYR,0
/PSYMB,FBCS,0
/PBC,ALL, ,1
/NUMBER,0
nlist
FINISH
! /EXIT,ALL
/BATCH
/COM,ANSYS RELEASE Release 19.1      BUILD 19.1      UP20180418       13:00:29
/input,menust,tmp,''
/GST,ON
/PLO,INFO,3
/GRO,CURL,ON
/CPLANE,1
WPSTYLE,,,,,,,,0
FINISH
! /EXIT,NOSAV
/BATCH
/COM,ANSYS RELEASE Release 19.1      BUILD 19.1      UP20180418       16:42:33
/input,menust,tmp,''
/GST,ON
/PLO,INFO,3
/GRO,CURL,ON
/CPLANE,1
WPSTYLE,,,,,,,,0
RESUME
/COM,ANSYS RELEASE Release 19.1      BUILD 19.1      UP20180418       16:42:39
a2vbc
