!******提取所有计算的模态，或者修改需要导出的模态数量******
/post1
*GET,Modalcount, ACTIVE, 0, SET, nset
Modalcount=100
!******提取所有计算的模态，或者修改需要导出的模态数量******

!******指定模态阻尼比******
Damperration=0.02
!******指定模态阻尼比******

!******指定输出模态文件名及路径******
ModefileNumber=2
modefiename2='Bridge_modalvectors'
modefiename1='Track_modalvectors'
modepathname='F:\横向项目\2017\浮置板\2020\浮置板计算文件\ansys剪力铰计算\上置式短板'
!******指定输出模态文件名及路径******

!******选择需要在VBC中定义弹簧-阻尼单元的节点，并存为节点组，注意：仅需要选择两个节点之间的一个弹簧，VBC中可以定义多个方向的弹簧参数******
esel,s,type,,3
nsle,s
cm,nodesspring,node
cm,elementspring,element
!******选择需要在VBC中定义弹簧-阻尼单元的节点，并存为节点组，注意：仅需要选择两个节点之间的一个弹簧，VBC中可以定义多个方向的弹簧参数******

!******将弹簧实常数编号转换为VBC中弹簧编号******
SpringType=2
SpringTypemapping=
*if,SpringType,ge,1,then
*dim,SpringTypemapping,array,SpringType,2
SpringTypemapping(1,1)=1003,1007
SpringTypemapping(1,2)=5,3
*endif
!******将弹簧实常数编号转换为VBC中弹簧编号******

!******选择需要在VBC中定义为轨道的节点，并存为节点组******
nsel,r,loc,y,0.3,0.4
cm,nodestrack,node
!******选择需要在VBC中定义为轨道的节点，并存为节点组******

!******选择需要在VBC中定义后处理位移和应力/内力的节点，并存为节点组******
nsel,r,loc,x,40,50
cm,nodespost,node

esel,s,type,,7
esln,r
cm,elementpost,element
!******选择需要在VBC中定义后处理位移和应力/内力的节点，并存为节点组******


!******以下部分通常不需修改******
!******选择需要在VBC中定义的所有节点，并存为节点组******
nsel,s,,, nodesspring
nsel,a,,, nodestrack
nsel,a,,, nodespost
cm,nodesall,node
!******选择需要在VBC中定义的所有节点，并存为节点组******

WriteBridge


Modalcount=400
esel,s,type,,2
nsle,s
/solu
antype,modal
OUTRES,ALL,ALL
modopt,lanb,Modalcount            !分块兰索斯法
mxpand,Modalcount,,,no
lumpm,off                 !采用一致质量矩阵
solve
finish

nsel,r,,, nodesspring
cm,nodesall,node
esel,none
cm,elementpost,element
WriteMode,modefiename1


esel,s,type,,7
esel,a,type,,1
!esel,a,real,,1007,1009
nsle,s

/solu
antype,modal
OUTRES,ALL,ALL
modopt,lanb,Modalcount            !分块兰索斯法
mxpand,Modalcount,,,no
lumpm,off                 !采用一致质量矩阵
solve
finish

nsel,r,,, nodesspring
cm,nodesall,node
esel,s,,,elementpost
cm,elementpost,element
WriteMode,modefiename2
